// SBML level 2 version 4

function linear_activation(k, modifier)
  k*modifier;
end

function Rate_Law_for_Translation_two(rt, R)
  rt/R;
end

function Transcription_2(ao, P, A, Kd)
  ao*(1 - P/A - Kd/A + ((1 - P/A - Kd/A)^2 + 4*Kd/A)^0.5)/2;
end

model Model_1()
  // NNF Simple Model

  // Compartments:
  compartment Cell = 1;

  // Species:
  species M in Cell = 0.131989;
  species Pc in Cell = 0.0884607;
  species P in Cell = 0.061432;
  species A in Cell = 0.0656595;
  species R in Cell = 0.409108;

  // Parameters:
  ao = 1;
  parameter_2 = 1; parameter_2 is "at";
  ah = 1;
  bo = 1;
  bt = 1;
  bh = 1;
  kd = 1e-5;
  ro = 1;
  rt = 0.0043;
  do = 0.2;
  dt = 0.2;

  // Reactions:
  Translation: => Pc; Cell*linear_activation(parameter_2, M);  // modifiers: M
  Activation: => P; Cell*linear_activation(ah, Pc);  // modifiers: Pc
  Transcription: => M; Cell*Transcription_2(ao, P, A, kd);  // modifiers: P, A
  Degradation_M: M => ; Cell*bo*M;
  Degradation_Pc: Pc => ; Cell*bt*Pc;
  Degradation_P: P => ; Cell*bh*P;
  Transcription_two: => R; Cell*Transcription_2(ro, P, A, kd);  // modifiers: P, A
  Translation_two: => A; Cell*Rate_Law_for_Translation_two(rt, R);  // modifiers: R
  Degradation_R: R => ; Cell*do*R;
  Degradation_A: A => ; Cell*dt*A;

  // Unit definitions:
  unit volume = dimensionless;
  unit time = 3600 second;
  unit substance = dimensionless;
end
