// SBML level 2 version 1

function Transcription_2(ao, P, A, Kd)
  ao*(1 - P/A - Kd/A + ((1 - P/A - Kd/A)^2 + 4*Kd/A)^0.5)/2;
end

function linear_activation(k, modifier)
  k*modifier;
end

model Model_1()
  // SNF Simple Model

  // Compartments:
  compartment Cell = 1;

  // Species:
  species M in Cell = 0.04305394;
  species Pc in Cell = 0.07727419;
  species P in Cell = 0.08021989;
  species $A in Cell = 0.0659;

  // Parameters:
  ao = 1;
  parameter_2 = 1; parameter_2 is "at";
  ah = 1;
  bo = 1;
  bt = 1;
  bh = 1;
  kd = 1e-5;

  // Reactions:
  Translation: => Pc; Cell*linear_activation(parameter_2, M);  // modifiers: M
  Activation: => P; Cell*linear_activation(ah, Pc);  // modifiers: Pc
  Transcription: => M; Cell*Transcription_2(ao, P, A, kd);  // modifiers: P, A
  Degradation_M: M => ; Cell*bo*M;
  Degradation_Pc: Pc => ; Cell*bt*Pc;
  Degradation_P: P => ; Cell*bh*P;

  // Unit definitions:
  unit volume = dimensionless;
  unit time = 3600 second;
  unit substance = dimensionless;
end
