// SBML level 3 version 2
// Exported by VCell 7.3

model RS_JBC2016_Application0()
  // model units - substance: umol, time: s, volume: l, area: um2, length: um, extent: umol

  // Compartments:
  compartment IC = 7e-12 l;
  compartment EC = 7.1e-12 l;
  compartment PM = 21000 um2;  // 2-D

  // Species:
  species PDE2_cGMP in IC = 0;
  species PDE2_inhibited in IC = 0;
  species Bay60 in IC = 0;
  species PDEbg_cGMP in IC = 0.1;
  species GMP in IC = 0;
  species PDE2_cAMP in IC = 0;
  species $GTP in IC = 500;
  species sGC_basal in IC = 0.15;
  species R2C2_cAMP in IC = 0;
  species R2C2 in IC = 0.5;
  species R2C2_cAMP2 in IC = 0;
  species PKA in IC = 0;
  species R2C_cAMP4 in IC = 0;
  species R2_cAMP4 in IC = 0;
  species R2C2_cAMP4 in IC = 0;
  species GluA1_845 in IC = 0;
  species Four1N in IC = 0.01;
  species AMPAR in PM = 0;
  species GluA1_dephos in PM = 0;
  species Ga_GTP in PM = 0;
  species PDE1 in IC = 0.5;
  species D1R in PM = 3.321078e-17;
  species Gaby in PM = 3.321078e-17;
  species $GluA1 in IC = 0.01;
  species cAMP in IC = 0;
  species DA_D1R_Gaby in PM = 0;
  species PDE1_cGMP in IC = 0;
  species R2C2_cAMP3 in IC = 0;
  species PDE2 in IC = 0.5;
  species cGMP in IC = 0;
  species PDE2_active_cAMP in IC = 0;
  species AMP in IC = 0;
  species PDE2_active_cGMP in IC = 0;
  species Gby in PM = 0;
  species Ga_GDP in PM = 0;
  species D1R_Gaby in PM = 0;
  species DA_D1R in PM = 0;
  species PDEbg_cAMP in IC = 0.1;
  species ACbg in PM = 2.490808e-17;
  species PDE1_cAMP in IC = 0;
  species DA in EC = 0;
  species DARPP32 in IC = 0.5;
  species DARPP32_Pi in IC = 0;
  species AC5 in PM = 9.132963e-17;
  species AC5_Ga in PM = 0;
  species DARPP32_Pi_PP1 in IC = 0;
  species PP2A in IC = 0.1;
  species MMPX in IC = 0;
  species PP1 in IC = 0.11;
  species ERK_active in IC = 0;
  species PDE4_ERK in IC = 0;
  species PDE4 in IC = 0.1;
  species PDE4_PKA in IC = 0;
  species PDE4_ERK_PKA in IC = 0;
  species PDE1_inhibited in IC = 0;
  species $ATP in IC = 5000;
  species BRaf in IC = 0.18;
  species BRaf_PKA in IC = 0;
  species MEK_active in IC = 0;
  species MEK_Ser in IC = 0;
  species MEK in IC = 0.18;
  species ERK_Tyr in IC = 0;
  species ERK in IC = 0.36;
  species STEP in IC = 0.2;
  species STEP_PKA in IC = 0;
  species PDE2_active in IC = 0;
  species SNAP in IC = 0;
  species sGC_inactive in IC = 0.15;
  species sGC_active in IC = 0;

  // Parameters:
  _T_ = 300 K;
  _PI_ = 3.141593 _one_;
  _F_ = 9.64853321e4 C_mol_1;
  _F_nmol_ = 9.64853321e-5 C_nmol_1;
  _N_pmol_ = 6.02214179e11 molecules_pmol_1;
  _K_GHK_ = 1e-9 _one_000000000;
  _R_ = 8314.463 mV_C_K_1_mol_1;
  K_millivolts_per_volt = 1000 mV_V_1;
  KMOLE = 0.001660539 uM_um3_molecules_1;
  Km_r097 = 6 umol_l_1;
  Kcat_r097 = 5 s_1;
  Vmax_r097 has umol_l_1_s_1;
  Km_r096 = 25.641 umol_l_1;
  Kcat_r096 = 1 s_1;
  Vmax_r096 has umol_l_1_s_1;
  Km_r010 = 315 umol_l_1;
  Kcat_r010 = 8.5 s_1;
  Vmax_r010 has umol_um_2_s_1;
  Km_r093 = 0.77 umol_l_1;
  Kcat_r093 = 0.636 s_1;
  Vmax_r093 has umol_l_1_s_1;
  Km_r094 = 0.46 umol_l_1;
  Kcat_r094 = 1.06 s_1;
  Vmax_r094 has umol_l_1_s_1;
  Kf_r027 = 4.73 s_1;
  Kr_r027 = 0 l_s_1_umol_1;
  Kf_r044 = 0.05 s_1;
  Kr_r044 = 0.085 l_s_1_umol_1;
  Kf_r073 = 10 s_1;
  Kr_r073 = 0 l_s_1_umol_1;
  Kf_r051 = 1 l_s_1_umol_1;
  Kr_r051 = 1.2 s_1;
  Km_r070 = 2.4 umol_l_1;
  Kcat_r070 = 2.7 s_1;
  Vmax_r070 has umol_l_1_s_1;
  Kf_r071 = 100 l_s_1_umol_1;
  Kr_r071 = 0.2 s_1;
  Kf_r019 = 10.7 l_s_1_umol_1;
  Kr_r019 = 86 s_1;
  Kf_r054 = 1 l_s_1_umol_1;
  Kr_r054 = 0.01 s_1;
  Kf_r058 = 1 l_s_1_umol_1;
  Kr_r058 = 0.01 s_1;
  Kf_r001 = 3.613285e16 um2_s_1_umol_1;
  Kr_r001 = 0.0003 s_1;
  Kf_r029 = 8.4 s_1;
  Kr_r029 = 0 l_s_1_umol_1;
  Kf_r059 = 1 l_s_1_umol_1;
  Kr_r059 = 0.01 s_1;
  Km_r060 = 25 umol_l_1;
  Kcat_r060 = 25 s_1;
  Vmax_r060 has umol_l_1_s_1;
  Kf_r048 = 2.225122e-18 l2_um_2_s_1_umol_1;
  Kr_r048 = 0.008 s_1;
  Kf_r017 = 21.5 s_1;
  Kr_r017 = 0 l_s_1_umol_1;
  Kf_r016 = 21 s_1;
  Kr_r016 = 0 l_s_1_umol_1;
  Kf_r018 = 3.5 l_s_1_umol_1;
  Kr_r018 = 84 s_1;
  Kf_r028 = 7 l_s_1_umol_1;
  Kr_r028 = 33.6 s_1;
  Kf_r005 = 20 s_1;
  Kr_r005 = 0 um4_s_1_umol_2;
  Kf_r053 = 1 l_s_1_umol_1;
  Kr_r053 = 1.2 s_1;
  Km_r072 = 0.37 umol_l_1;
  Kcat_r072 = 6.7 s_1;
  Vmax_r072 has umol_l_1_s_1;
  Kf_r002 = 3.33 l_s_1_umol_1;
  Kr_r002 = 10 s_1;
  Kf_r026 = 0.36 l_s_1_umol_1;
  Kr_r026 = 18.9 s_1;
  Kf_r052 = 1 l_s_1_umol_1;
  Kr_r052 = 1.2 s_1;
  Kf_r011 = 4.1 l_s_1_umol_1;
  Kr_r011 = 0.9 s_1;
  Kf_r042 = 0.27 l_s_1_umol_1;
  Kr_r042 = 0.28 s_1;
  Km_r085 = 7.5 umol_l_1;
  Kcat_r085 = 3 s_1;
  Vmax_r085 has umol_l_1_s_1;
  Km_r086 = 15.657 umol_l_1;
  Kcat_r086 = 6 s_1;
  Vmax_r086 has umol_l_1_s_1;
  Km_r087 = 0.15909 umol_l_1;
  Kcat_r087 = 0.18 s_1;
  Vmax_r087 has umol_l_1_s_1;
  Km_r088 = 0.15909 umol_l_1;
  Kcat_r088 = 0.18 s_1;
  Vmax_r088 has umol_l_1_s_1;
  Km_r091 = 0.046296 umol_l_1;
  Kcat_r091 = 0.15 s_1;
  Vmax_r091 has umol_l_1_s_1;
  Km_r089 = 15.657 umol_l_1;
  Kcat_r089 = 6 s_1;
  Vmax_r089 has umol_l_1_s_1;
  Km_r090 = 15.657 umol_l_1;
  Kcat_r090 = 6 s_1;
  Vmax_r090 has umol_l_1_s_1;
  Km_r092 = 0.046296 umol_l_1;
  Kcat_r092 = 0.15 s_1;
  Vmax_r092 has umol_l_1_s_1;
  Km_r095 = 9 umol_l_1;
  Kcat_r095 = 0.1 s_1;
  Vmax_r095 has umol_l_1_s_1;
  Km_r025 = 1030 umol_l_1;
  Kcat_r025 = 0.9 s_1;
  Vmax_r025 has umol_um_2_s_1;
  Kf_r000 = 1.11 l_s_1_umol_1;
  Kr_r000 = 10 s_1;
  Km_r047 = 0.97145 umol_l_1;
  Kcat_r047 = 0.17 s_1;
  Vmax_r047 has umol_l_1_s_1;
  Km_r049 = 2.009252e-16 umol_um_2;
  Kcat_r049 = 0.17 molecules_uM_1_um_2_s_1;
  Vmax_r049 has umol_um_2_s_1;
  Kf_r050 = 0.0008 s_1;
  Kr_r050 = 0 l2_um_2_s_1_umol_1;
  Km_r075 = 7.5 umol_l_1;
  Kcat_r075 = 3 s_1;
  Vmax_r075 has umol_l_1_s_1;
  Kf_r007 = 2.318525e19 um2_s_1_umol_1;
  Kr_r007 = 50 s_1;
  Kf_r006 = 10 s_1;
  Kr_r006 = 0 s_1;
  Km_r077 = 7.5 umol_l_1;
  Kcat_r077 = 0.1 s_1;
  Vmax_r077 has umol_l_1_s_1;
  Km_r078 = 8 umol_l_1;
  Kcat_r078 = 1 s_1;
  Vmax_r078 has umol_l_1_s_1;
  Km_r080 = 25.641 umol_l_1;
  Kcat_r080 = 0.1 s_1;
  Vmax_r080 has umol_l_1_s_1;
  Km_r076 = 8 umol_l_1;
  Kcat_r076 = 5 s_1;
  Vmax_r076 has umol_l_1_s_1;
  Km_r079 = 8 umol_l_1;
  Kcat_r079 = 5 s_1;
  Vmax_r079 has umol_l_1_s_1;
  Km_r083 = 1.8 umol_l_1;
  Kcat_r083 = 27 s_1;
  Vmax_r083 has umol_l_1_s_1;
  Km_r084 = 1.8 umol_l_1;
  Kcat_r084 = 0.01 s_1;
  Vmax_r084 has umol_l_1_s_1;
  Km_r024 = 10 umol_l_1;
  Kcat_r024 = 25 s_1;
  Vmax_r024 has umol_l_1_s_1;
  Kf_r056 = 1 l_s_1_umol_1;
  Kr_r056 = 0.01 s_1;
  Km_r074 = 0.47 umol_l_1;
  Kcat_r074 = 10 s_1;
  Vmax_r074 has umol_l_1_s_1;
  Km_r081 = 1.8 umol_l_1;
  Kcat_r081 = 10 s_1;
  Vmax_r081 has umol_l_1_s_1;
  Kf_r012 = 10.7 l_s_1_umol_1;
  Kr_r012 = 86 s_1;
  Km_r046 = 7.5 umol_l_1;
  Kcat_r046 = 6 s_1;
  Vmax_r046 has umol_l_1_s_1;
  Km_r082 = 1.8 umol_l_1;
  Kcat_r082 = 8 s_1;
  Vmax_r082 has umol_l_1_s_1;
  Kf_r057 = 1 l_s_1_umol_1;
  Kr_r057 = 0.01 s_1;
  Kf_r055 = 1 l_s_1_umol_1;
  Kr_r055 = 0.01 s_1;
  Kf_r015 = 21.5 s_1;
  Kr_r015 = 0 l_s_1_umol_1;
  Km_r009 = 1030 umol_l_1;
  Kcat_r009 = 0.2 s_1;
  Vmax_r009 has umol_um_2_s_1;
  Kf_r014 = 84 s_1;
  Kr_r014 = 0 l_s_1_umol_1;
  Km_r039 = 100 umol_l_1;
  Kcat_r039 = 0.18 s_1;
  Vmax_r039 has umol_l_1_s_1;
  Kf_r041 = 0.035 l_s_1_umol_1;
  Kr_r041 = 0.06 s_1;
  Kf_r045 = 0.05 s_1;
  Kr_r045 = 0.085 l_s_1_umol_1;
  Kf_r013 = 14 l_s_1_umol_1;
  Kr_r013 = 84 s_1;
  Kf_r043 = 0.27 l_s_1_umol_1;
  Kr_r043 = 0.28 s_1;
  Kf_r004 = 6.02214179e19 um2_s_1_umol_1;
  Kr_r004 = 0 s_1;
  Kf_r003 = 3.613285e17 um2_s_1_umol_1;
  Kr_r003 = 0.001 s_1;
  Kf_r040 = 0.035 l_s_1_umol_1;
  Kr_r040 = 0.06 s_1;
  Kf_r098 = 1 l_s_1_umol_1;
  Kr_r098 = 0.25 s_1;
  Km_r099 = 45 umol_l_1;
  Kcat_r099 = 7.35 s_1;
  Vmax_r099 has umol_l_1_s_1;

  // Assignment rules:
  Vmax_r097 := Kcat_r097*PP1;
  Vmax_r096 := Kcat_r096*PKA;
  Vmax_r010 := Kcat_r010*AC5_Ga;
  Vmax_r093 := Kcat_r093*PP2A;
  Vmax_r094 := Kcat_r094*STEP;
  Vmax_r070 := Kcat_r070*PKA;
  Vmax_r060 := Kcat_r060*PDEbg_cGMP;
  Vmax_r072 := Kcat_r072*PP2A;
  Vmax_r085 := Kcat_r085*PKA;
  Vmax_r086 := Kcat_r086*PP2A;
  Vmax_r087 := Kcat_r087*BRaf_PKA;
  Vmax_r088 := Kcat_r088*BRaf_PKA;
  Vmax_r091 := Kcat_r091*MEK_active;
  Vmax_r089 := Kcat_r089*PP2A;
  Vmax_r090 := Kcat_r090*PP2A;
  Vmax_r092 := Kcat_r092*MEK_active;
  Vmax_r095 := Kcat_r095*STEP_PKA;
  Vmax_r025 := Kcat_r025*ACbg;
  Vmax_r047 := Kcat_r047*PP1;
  Vmax_r049 := 1.660539e-18*Kcat_r049*PP1;
  Vmax_r075 := Kcat_r075*PKA;
  Vmax_r077 := Kcat_r077*PKA;
  Vmax_r078 := Kcat_r078*PP1;
  Vmax_r080 := Kcat_r080*ERK_active;
  Vmax_r076 := Kcat_r076*PP1;
  Vmax_r079 := Kcat_r079*PP1;
  Vmax_r083 := Kcat_r083*PDE4_PKA;
  Vmax_r084 := Kcat_r084*PDE4_ERK;
  Vmax_r024 := Kcat_r024*PDEbg_cAMP;
  Vmax_r074 := Kcat_r074*ERK_active;
  Vmax_r081 := Kcat_r081*PDE4;
  Vmax_r046 := Kcat_r046*PKA;
  Vmax_r082 := Kcat_r082*PDE4_ERK_PKA;
  Vmax_r009 := Kcat_r009*AC5;
  Vmax_r039 := Kcat_r039*sGC_basal;
  Vmax_r099 := Kcat_r099*sGC_active;

  // Reactions:
  r097: STEP_PKA -> STEP; Vmax_r097*STEP_PKA/(Km_r097 + STEP_PKA)*IC;  // modifiers: PP1
  r096: STEP -> STEP_PKA; Vmax_r096*STEP/(Km_r096 + STEP)*IC;  // modifiers: PKA
  r010: $ATP -> cAMP; Vmax_r010*ATP/(Km_r010 + ATP)*PM;  // modifiers: AC5_Ga
    r010_I = 0 pA_um_2; r010_netValence = 1 _one_;
  r093: ERK_active -> ERK_Tyr; Vmax_r093*ERK_active/(Km_r093 + ERK_active)*IC;  // modifiers: PP2A
  r094: ERK_Tyr -> ERK; Vmax_r094*ERK_Tyr/(Km_r094 + ERK_Tyr)*IC;  // modifiers: STEP
  r027: PDE1_cAMP -> PDE1 + AMP; (Kf_r027*PDE1_cAMP - Kr_r027*PDE1*AMP)*IC;
  r044: R2C2_cAMP4 -> PKA + R2C_cAMP4; (Kf_r044*R2C2_cAMP4 - Kr_r044*PKA*R2C_cAMP4)*IC;
  r073: DARPP32_Pi_PP1 -> PP1 + DARPP32; (Kf_r073*DARPP32_Pi_PP1 - Kr_r073*PP1*DARPP32)*IC;
  r051: PDE1 + MMPX -> PDE1_inhibited; (Kf_r051*PDE1*MMPX - Kr_r051*PDE1_inhibited)*IC;
  r070: DARPP32 -> DARPP32_Pi; Vmax_r070*DARPP32/(Km_r070 + DARPP32)*IC;  // modifiers: PKA
  r071: DARPP32_Pi + PP1 -> DARPP32_Pi_PP1; (Kf_r071*DARPP32_Pi*PP1 - Kr_r071*DARPP32_Pi_PP1)*IC;
  r019: PDE2_active + cGMP -> PDE2_active_cGMP; (Kf_r019*PDE2_active*cGMP - Kr_r019*PDE2_active_cGMP)*IC;
  r054: PDE2 + Bay60 -> PDE2_inhibited; (Kf_r054*PDE2*Bay60 - Kr_r054*PDE2_inhibited)*IC;
  r058: PDE2_active_cAMP + Bay60 -> PDE2_inhibited; (Kf_r058*PDE2_active_cAMP*Bay60 - Kr_r058*PDE2_inhibited)*IC;
  r001: Gaby + D1R -> D1R_Gaby; (Kf_r001*Gaby*D1R - Kr_r001*D1R_Gaby)*PM;
    r001_I = 0 pA_um_2; r001_netValence = 1 _one_;
  r029: PDE1_cGMP -> GMP + PDE1; (Kf_r029*PDE1_cGMP - Kr_r029*GMP*PDE1)*IC;
  r059: PDE2_active_cGMP + Bay60 -> PDE2_inhibited; (Kf_r059*PDE2_active_cGMP*Bay60 - Kr_r059*PDE2_inhibited)*IC;
  r060: cGMP -> GMP; Vmax_r060*cGMP/(Km_r060 + cGMP)*IC;  // modifiers: PDEbg_cGMP
  r048: Four1N + GluA1_845 -> AMPAR; (Kf_r048*Four1N*GluA1_845 - Kr_r048*AMPAR)*PM;
    r048_I = 0 pA_um_2; r048_netValence = 1 _one_;
  r017: PDE2_cGMP -> GMP + PDE2; (Kf_r017*PDE2_cGMP - Kr_r017*GMP*PDE2)*IC;
  r016: PDE2_cAMP -> AMP + PDE2; (Kf_r016*PDE2_cAMP - Kr_r016*AMP*PDE2)*IC;
  r018: PDE2 + cAMP -> PDE2_cAMP; (Kf_r018*PDE2*cAMP - Kr_r018*PDE2_cAMP)*IC;
  r028: PDE1 + cGMP -> PDE1_cGMP; (Kf_r028*PDE1*cGMP - Kr_r028*PDE1_cGMP)*IC;
  r005: DA_D1R_Gaby -> Gby + Ga_GTP + DA_D1R; (Kf_r005*DA_D1R_Gaby - Kr_r005*Gby*Ga_GTP*DA_D1R)*PM;
    r005_I = 0 pA_um_2; r005_netValence = 1 _one_;
  r053: PDE1_cGMP + MMPX -> PDE1_inhibited; (Kf_r053*PDE1_cGMP*MMPX - Kr_r053*PDE1_inhibited)*IC;
  r072: DARPP32_Pi -> DARPP32; Vmax_r072*DARPP32_Pi/(Km_r072 + DARPP32_Pi)*IC;  // modifiers: PP2A
  r002: D1R_Gaby + DA -> DA_D1R_Gaby; (Kf_r002*D1R_Gaby*DA - Kr_r002*DA_D1R_Gaby)*PM;
    r002_I = 0 pA_um_2; r002_netValence = 1 _one_;
  r026: PDE1 + cAMP -> PDE1_cAMP; (Kf_r026*PDE1*cAMP - Kr_r026*PDE1_cAMP)*IC;
  r052: PDE1_cAMP + MMPX -> PDE1_inhibited; (Kf_r052*PDE1_cAMP*MMPX - Kr_r052*PDE1_inhibited)*IC;
  r011: PDE2 + cGMP -> PDE2_active; (Kf_r011*PDE2*cGMP - Kr_r011*PDE2_active)*IC;
  r042: R2C2_cAMP2 + cAMP -> R2C2_cAMP3; (Kf_r042*R2C2_cAMP2*cAMP - Kr_r042*R2C2_cAMP3)*IC;
  r085: BRaf -> BRaf_PKA; Vmax_r085*BRaf/(Km_r085 + BRaf)*IC;  // modifiers: PKA
  r086: BRaf_PKA -> BRaf; Vmax_r086*BRaf_PKA/(Km_r086 + BRaf_PKA)*IC;  // modifiers: PP2A
  r087: MEK -> MEK_Ser; Vmax_r087*MEK/(Km_r087 + MEK)*IC;  // modifiers: BRaf_PKA
  r088: MEK_Ser -> MEK_active; Vmax_r088*MEK_Ser/(Km_r088 + MEK_Ser)*IC;  // modifiers: BRaf_PKA
  r091: ERK -> ERK_Tyr; Vmax_r091*ERK/(Km_r091 + ERK)*IC;  // modifiers: MEK_active
  r089: MEK_active -> MEK_Ser; Vmax_r089*MEK_active/(Km_r089 + MEK_active)*IC;  // modifiers: PP2A
  r090: MEK_Ser -> MEK; Vmax_r090*MEK_Ser/(Km_r090 + MEK_Ser)*IC;  // modifiers: PP2A
  r092: ERK_Tyr -> ERK_active; Vmax_r092*ERK_Tyr/(Km_r092 + ERK_Tyr)*IC;  // modifiers: MEK_active
  r095: ERK_Tyr -> ERK; Vmax_r095*ERK_Tyr/(Km_r095 + ERK_Tyr)*IC;  // modifiers: STEP_PKA
  r025: $ATP -> cAMP; Vmax_r025*ATP/(Km_r025 + ATP)*PM;  // modifiers: ACbg
    r025_I = 0 pA_um_2; r025_netValence = 1 _one_;
  r000: D1R + DA -> DA_D1R; (Kf_r000*D1R*DA - Kr_r000*DA_D1R)*PM;
    r000_I = 0 pA_um_2; r000_netValence = 1 _one_;
  r047: GluA1_845 -> $GluA1; Vmax_r047*GluA1_845/(Km_r047 + GluA1_845)*IC;  // modifiers: PP1
  r049: AMPAR -> GluA1_dephos; Vmax_r049*AMPAR/(Km_r049 + AMPAR)*PM;  // modifiers: PP1
    r049_I = 0 pA_um_2; r049_netValence = 1 _one_;
  r050: GluA1_dephos -> $GluA1 + Four1N; (Kf_r050*GluA1_dephos - Kr_r050*GluA1*Four1N)*PM;
    r050_I = 0 pA_um_2; r050_netValence = 1 _one_;
  r075: PDE4 -> PDE4_PKA; Vmax_r075*PDE4/(Km_r075 + PDE4)*IC;  // modifiers: PKA
  r007: Ga_GTP + AC5 -> AC5_Ga; (Kf_r007*Ga_GTP*AC5 - Kr_r007*AC5_Ga)*PM;
    r007_I = 0 pA_um_2; r007_netValence = 1 _one_;
  r006: Ga_GTP -> Ga_GDP; (Kf_r006*Ga_GTP - Kr_r006*Ga_GDP)*PM;
    r006_I = 0 pA_um_2; r006_netValence = 1 _one_;
  r077: PDE4_ERK -> PDE4_ERK_PKA; Vmax_r077*PDE4_ERK/(Km_r077 + PDE4_ERK)*IC;  // modifiers: PKA
  r078: PDE4_ERK_PKA -> PDE4; Vmax_r078*PDE4_ERK_PKA/(Km_r078 + PDE4_ERK_PKA)*IC;  // modifiers: PP1
  r080: PDE4_PKA -> PDE4_ERK_PKA; Vmax_r080*PDE4_PKA/(Km_r080 + PDE4_PKA)*IC;  // modifiers: ERK_active
  r076: PDE4_ERK -> PDE4; Vmax_r076*PDE4_ERK/(Km_r076 + PDE4_ERK)*IC;  // modifiers: PP1
  r079: PDE4_PKA -> PDE4; Vmax_r079*PDE4_PKA/(Km_r079 + PDE4_PKA)*IC;  // modifiers: PP1
  r083: cAMP -> AMP; Vmax_r083*cAMP/(Km_r083 + cAMP)*IC;  // modifiers: PDE4_PKA
  r084: cAMP -> AMP; Vmax_r084*cAMP/(Km_r084 + cAMP)*IC;  // modifiers: PDE4_ERK
  r024: cAMP -> AMP; Vmax_r024*cAMP/(Km_r024 + cAMP)*IC;  // modifiers: PDEbg_cAMP
  r056: Bay60 + PDE2_cGMP -> PDE2_inhibited; (Kf_r056*Bay60*PDE2_cGMP - Kr_r056*PDE2_inhibited)*IC;
  r074: PDE4 -> PDE4_ERK; Vmax_r074*PDE4/(Km_r074 + PDE4)*IC;  // modifiers: ERK_active
  r081: cAMP -> AMP; Vmax_r081*cAMP/(Km_r081 + cAMP)*IC;  // modifiers: PDE4
  r012: cGMP + PDE2 -> PDE2_cGMP; (Kf_r012*cGMP*PDE2 - Kr_r012*PDE2_cGMP)*IC;
  r046: $GluA1 -> GluA1_845; Vmax_r046*GluA1/(Km_r046 + GluA1)*IC;  // modifiers: PKA
  r082: cAMP -> AMP; Vmax_r082*cAMP/(Km_r082 + cAMP)*IC;  // modifiers: PDE4_ERK_PKA
  r057: PDE2_active + Bay60 -> PDE2_inhibited; (Kf_r057*PDE2_active*Bay60 - Kr_r057*PDE2_inhibited)*IC;
  r055: Bay60 + PDE2_cAMP -> PDE2_inhibited; (Kf_r055*Bay60*PDE2_cAMP - Kr_r055*PDE2_inhibited)*IC;
  r015: PDE2_active_cGMP -> GMP + PDE2_active; (Kf_r015*PDE2_active_cGMP - Kr_r015*GMP*PDE2_active)*IC;
  r009: $ATP -> cAMP; Vmax_r009*ATP/(Km_r009 + ATP)*PM;  // modifiers: AC5
    r009_I = 0 pA_um_2; r009_netValence = 1 _one_;
  r014: PDE2_active_cAMP -> AMP + PDE2_active; (Kf_r014*PDE2_active_cAMP - Kr_r014*AMP*PDE2_active)*IC;
  r039: $GTP -> cGMP; Vmax_r039*GTP/(Km_r039 + GTP)*IC;  // modifiers: sGC_basal
  r041: R2C2_cAMP + cAMP -> R2C2_cAMP2; (Kf_r041*R2C2_cAMP*cAMP - Kr_r041*R2C2_cAMP2)*IC;
  r045: R2C_cAMP4 -> R2_cAMP4 + PKA; (Kf_r045*R2C_cAMP4 - Kr_r045*R2_cAMP4*PKA)*IC;
  r013: PDE2_active + cAMP -> PDE2_active_cAMP; (Kf_r013*PDE2_active*cAMP - Kr_r013*PDE2_active_cAMP)*IC;
  r043: R2C2_cAMP3 + cAMP -> R2C2_cAMP4; (Kf_r043*R2C2_cAMP3*cAMP - Kr_r043*R2C2_cAMP4)*IC;
  r004: Ga_GDP + Gby -> Gaby; (Kf_r004*Ga_GDP*Gby - Kr_r004*Gaby)*PM;
    r004_I = 0 pA_um_2; r004_netValence = 1 _one_;
  r003: DA_D1R + Gaby -> DA_D1R_Gaby; (Kf_r003*DA_D1R*Gaby - Kr_r003*DA_D1R_Gaby)*PM;
    r003_I = 0 pA_um_2; r003_netValence = 1 _one_;
  r040: cAMP + R2C2 -> R2C2_cAMP; (Kf_r040*cAMP*R2C2 - Kr_r040*R2C2_cAMP)*IC;
  r098: sGC_inactive + SNAP -> sGC_active; (Kf_r098*sGC_inactive*SNAP - Kr_r098*sGC_active)*IC;
  r099: $GTP -> cGMP; Vmax_r099*GTP/(Km_r099 + GTP)*IC;  // modifiers: sGC_active

  // Events:
  dopamine: at (61200) after (0 != 61200), t0=false: DA = 0.1;
  drug: at (61800) after (0 != 61800), t0=false: MMPX = 0, Bay60 = 0, SNAP = 0;

  // Unit definitions:
  unit umol = 1e-6 mole;
  unit l = litre;
  unit um2 = (1e-6 metre)^2;
  unit um = 1e-6 metre;
  unit s = second;
  unit K = kelvin;
  unit _one_ = dimensionless;
  unit C_mol_1 = coulomb / mole;
  unit C_nmol_1 = coulomb / (1e-9 mole);
  unit molecules_pmol_1 = item / (1e-12 mole);
  unit _one_000000000 = 1e9 dimensionless;
  unit mV_C_K_1_mol_1 = 1e-3 volt * coulomb / (kelvin * mole);
  unit mV_V_1 = dimensionless;
  unit uM_um3_molecules_1 = 1e-6 mole * (1e-6 metre)^3 / (litre * item);
  unit umol_l_1 = 1e-6 mole / litre;
  unit s_1 = 1 / second;
  unit umol_l_1_s_1 = 1e-6 mole / (litre * second);
  unit pA_um_2 = 1e-12 ampere / (1e-6 metre)^2;
  unit umol_um_2_s_1 = 1e-6 mole / ((1e-6 metre)^2 * second);
  unit l_s_1_umol_1 = litre / (second * 1e-6 mole);
  unit um2_s_1_umol_1 = (1e-6 metre)^2 / (second * 1e-6 mole);
  unit l2_um_2_s_1_umol_1 = litre^2 / ((1e-6 metre)^2 * second * 1e-6 mole);
  unit um4_s_1_umol_2 = (1e-6 metre)^4 / (second * (1e-6 mole)^2);
  unit umol_um_2 = 1e-6 mole / (1e-6 metre)^2;
  unit molecules_uM_1_um_2_s_1 = item * litre / (1e-6 mole * (1e-6 metre)^2 * second);
end
