// SBML level 3 version 2
// Exported by VCell 7.3

model Histamine_RhoA_Model_FInal_Application1()
  // Histamine-RhoA Model_FInal_Application1
  // model units - substance: umol, time: s, volume: l, area: um2, length: um, extent: umol

  // Compartments:
  compartment c0 = 5e-11 l;

  // Species:
  species Gaq_act in c0 = 0;
  species H1HR_act in c0 = 0;
  species Histamine in c0 = 100;
  species p63_act in c0 = 0;
  species PLC_act in c0 = 0;
  species PIP2 in c0 = 48;
  species DAG in c0 = 0.72;
  species IP3 in c0 = 1.2;
  species RhoA_act in c0 = 0;
  species Ca_cyto in c0 = 0.1;
  species PKC_act in c0 = 0;
  species p115_act in c0 = 0;
  species RhoA_inact in c0 = 50;
  species H1HR_inact in c0 = 5;
  species Gaq_inact in c0 = 3.5;
  species p63_inact in c0 = 1;
  species p115_inact in c0 = 0.02;
  species PKC_inact in c0 = 15;
  species Ca_ER in c0 = 500;
  species PLC_inact in c0 = 1;
  species Ca_miscbound in c0 = 0;
  species Ca_mito in c0 = 0;
  species Ca_Ex in c0 = 0;
  species phosphatase in c0 = 0.5;
  species GAP_act in c0 = 3;
  species SERCA in c0 = 15;
  species PKC_Ca in c0 = 0;
  species Expumps_out in c0 = 15.6;
  species Expumps_in in c0 = 0.01;
  species Pyrilamine in c0 = 0;
  species PKC_act_translocate in c0 = 0;
  species GDI_act in c0 = 0.5;
  species GDI_inact in c0 = 0;
  species GAP_inact in c0 = 0;
  species DAG_deg in c0 = 0;

  // Parameters:
  _T_ = 300 K;
  _PI_ = 3.141593 _one_;
  _F_ = 9.64853321e4 C_mol_1;
  _F_nmol_ = 9.64853321e-5 C_nmol_1;
  _N_pmol_ = 6.02214179e11 molecules_pmol_1;
  _K_GHK_ = 1e-9 _one_000000000;
  _R_ = 8314.463 mV_C_K_1_mol_1;
  K_millivolts_per_volt = 1000 mV_V_1;
  KMOLE = 0.001660539 uM_um3_molecules_1;
  Kf_r0 = 0.0001 l_s_1_umol_1;
  Kr_r0 = 0.001 s_1;
  Kf_r1 = 0.015 l_s_1_umol_1;
  Kr_r1 = 7.2 s_1;
  Kf_r2 = 0.0042 l_s_1_umol_1;
  Kr_r2 = 1 s_1;
  Kf_r3 = 0.04 l_s_1_umol_1;
  Kr_r3 = 0.5 s_1;
  Km_r4 = 10 umol_l_1;
  Vmax_r4 has umol_l_1_s_1;
  Km_r5 = 1.55 umol_l_1;
  Vmax_r5 has umol_l_1_s_1;
  Km_r6 = 0.0813 umol_l_1;
  Vmax_r6 has umol_l_1_s_1;
  Km_r8 = 1 umol_l_1;
  Vmax_r8 has umol_l_1_s_1;
  Km_r9 = 1 umol_l_1;
  Vmax_r9 has umol_l_1_s_1;
  Kf_r10 = 2.43 s_1;
  Kr_r10 = 1 s_1;
  Km_r11 = 114 umol_l_1;
  Vmax_r11 has umol_l_1_s_1;
  Km_r13 = 7.2 umol_l_1;
  Vmax_r13 has umol_l_1_s_1;
  Km_r12 = 2.31 umol_l_1;
  Vmax_r12 has umol_l_1_s_1;
  Kf_r14 = 0.506 s_1;
  Kr_r14 = 0.476 s_1;
  Km_r15 = 0.52 umol_l_1;
  Vmax_r15 has umol_l_1_s_1;
  Kf_r16 = 0 s_1;
  Kf_r7 = 0.02 l_s_1_umol_1;
  Kr_r7 = 50 s_1;
  Kf_r20 = 1.5e-5 l_s_1_umol_1;
  Kr_r20 = 0.15 s_1;
  Kr_r17 = 0 s_1;
  Kf_r17 has s_1;
  Km_r21 = 1 umol_l_1;
  Vmax_r21 has umol_l_1_s_1;
  Kf_r23 = 0.0001 l_s_1_umol_1;
  Kr_r23 = 0 s_1;
  Kf_r24 = 0.0001 l_s_1_umol_1;
  Kr_r24 = 0 s_1;
  Kf_r22 = 0.00203 s_1;
  Kr_r22 = 0 s_1;
  Kf_r26 = 1 l_s_1_umol_1;
  Kr_r26 = 1 s_1;
  Kf_r27 = 0.02 s_1;
  Kr_r27 = 0.0087 s_1;
  Km_r28 = 7.2 umol_l_1;
  Vmax_r28 has umol_l_1_s_1;
  Km_r30 = 1 umol_l_1;
  Vmax_r30 has umol_l_1_s_1;
  Km_r25 = 7.2 umol_l_1;
  Vmax_r25 has umol_l_1_s_1;
  Km_r29 = 1 umol_l_1;
  Vmax_r29 has umol_l_1_s_1;
  Km_r31 = 17 umol_l_1;
  Vmax_r31 has umol_l_1_s_1;
  Kf_r18 = 1.5e-7 s_1;
  Kr_r18 = 0 s_1;

  // Assignment rules:
  Vmax_r4 := p63_act;
  Vmax_r5 := 800*PLC_act;
  Vmax_r6 := 10*IP3;
  Vmax_r8 := 1.1*PKC_act_translocate;
  Vmax_r9 := 0.5*p115_act;
  Vmax_r11 := 0.754*SERCA;
  Vmax_r13 := 0.036*phosphatase;
  Vmax_r12 := 0.0541*GAP_act;
  Vmax_r15 := 0.26*Expumps_out;
  Kf_r17 := PLC_act;
  Vmax_r21 := 0.1*Expumps_in;
  Vmax_r28 := 0.036*phosphatase;
  Vmax_r30 := 1.1*PKC_act_translocate;
  Vmax_r25 := 0.036*phosphatase;
  Vmax_r29 := 1.1*PKC_act_translocate;
  Vmax_r31 := 0.0242*GDI_act;

  // Reactions:
  // M Shahid Open Immun Journal 2009
  r0: Histamine + H1HR_inact -> H1HR_act; (Kf_r0*Histamine*H1HR_inact - Kr_r0*H1HR_act)*c0;
  // BH Kim et al. PLoS One 2013
  r1: Gaq_inact + H1HR_act -> Gaq_act; (Kf_r1*Gaq_inact*H1HR_act - Kr_r1*Gaq_act)*c0;
  // TJ Lukas Biophys Journal 2004
  r2: Gaq_act + PLC_inact -> PLC_act; (Kf_r2*Gaq_act*PLC_inact - Kr_r2*PLC_act)*c0;
  // S Lutz et al Science 2007 fitted kf
  r3: Gaq_act + p63_inact -> p63_act; (Kf_r3*Gaq_act*p63_inact - Kr_r3*p63_act)*c0;
  // fitted km vmax numbers are extrapolated by comparing p115 kinetics to p63 kinetics looked at p115 kobs from M Jaiswal et al JBC 2011 looked at p63 kobs from RJ Rojas et al JBC 2007
  r4: RhoA_inact -> RhoA_act; Vmax_r4*RhoA_inact/(Km_r4 + RhoA_inact)*c0;  // modifiers: p63_act
  // Km: Cheng-Jing Zhou et al. Biochem J 1993 kcat: BH Kim et al. PLoS One 2013 TJ Lukas Biophys Journal 2004
  r5: PIP2 -> DAG + IP3; Vmax_r5*PIP2/(Km_r5 + PIP2)*c0;  // modifiers: PLC_act
  // MR Maurya and S Subramanian Biophys J 2007 kcat went from .189 to 10
  r6: Ca_ER -> Ca_cyto; Vmax_r6*Ca_ER/(Km_r6 + Ca_ER)*c0;  // modifiers: IP3
  // JH Kang et al. Proteomics 2008 Km and vmax is averaged for all PKCs
  r8: p115_inact -> p115_act; Vmax_r8*p115_inact/(Km_r8 + p115_inact)*c0;  // modifiers: PKC_act_translocate
  // M Jaiswal et al JBC 2011
  r9: RhoA_inact -> RhoA_act; Vmax_r9*RhoA_inact/(Km_r9 + RhoA_inact)*c0;  // modifiers: p115_act
  // MR Maurya and S Subramanian Biophys J 2007 fitted kr
  r10: Ca_cyto -> Ca_miscbound; (Kf_r10*Ca_cyto - Kr_r10*Ca_miscbound)*c0;
  // MR Maurya and S Subramanian Biophys J 2007
  r11: Ca_cyto -> Ca_ER; Vmax_r11*Ca_cyto/(Km_r11 + Ca_cyto)*c0;  // modifiers: SERCA
  // MD Pato et al. Biochem J 1993 averaged from caldesmon and calponin changed .00364 to .0364
  r13: p115_act -> p115_inact; Vmax_r13*p115_act/(Km_r13 + p115_act)*c0;  // modifiers: phosphatase
  // averaged from p50GAP and p190GAP kinetic parameters R Li et al. JBC 1997
  r12: RhoA_act -> RhoA_inact; Vmax_r12*RhoA_act/(Km_r12 + RhoA_act)*c0;  // modifiers: GAP_act
  // MR Maurya and S Subramanian Biophys J 2007
  r14: Ca_cyto -> Ca_mito; (Kf_r14*Ca_cyto - Kr_r14*Ca_mito)*c0;
  // MR Maurya and S Subramanian Biophys J 2007 averaged from PMCA and NCX
  r15: Ca_cyto -> Ca_Ex; Vmax_r15*Ca_cyto/(Km_r15 + Ca_cyto)*c0;  // modifiers: Expumps_out
  // MR Maurya and S Subramanian Biophys J 2007
  r16: Ca_ER -> ; Kf_r16*Ca_ER*c0;
    Kr = 0 umol_l_1_s_1;
  // BH Kim et al. PLoS One 2013
  r7: Ca_cyto + PKC_inact -> PKC_Ca; (Kf_r7*Ca_cyto*PKC_inact - Kr_r7*PKC_Ca)*c0;
  // BH Kim et al. PLoS One 2013
  r20: DAG + PKC_Ca -> PKC_act; (Kf_r20*DAG*PKC_Ca - Kr_r20*PKC_act)*c0;
  // BH Kim et al. PLoS One 2013
  r17: Gaq_act -> Gaq_inact; (Kf_r17*Gaq_act - Kr_r17*Gaq_inact)*c0;  // modifiers: PLC_act
  // MR Maurya and S Subramanian Biophys J 2007 looking at NCX
  r21: Ca_Ex -> Ca_cyto; Vmax_r21*Ca_Ex/(Km_r21 + Ca_Ex)*c0;  // modifiers: Expumps_in
  r23: Expumps_in + Ca_cyto -> Expumps_out; (Kf_r23*Expumps_in*Ca_cyto - Kr_r23*Expumps_out)*c0;
  r24: Ca_Ex + Expumps_out -> Expumps_in; (Kf_r24*Ca_Ex*Expumps_out - Kr_r24*Expumps_in)*c0;
  // MR Maurya and S Subramanian Biophys J 2007 Ca ER leak
  r22: Ca_ER -> Ca_cyto; (Kf_r22*Ca_ER - Kr_r22*Ca_cyto)*c0;
  r26: Pyrilamine + H1HR_act -> H1HR_inact; (Kf_r26*Pyrilamine*H1HR_act - Kr_r26*H1HR_inact)*c0;
  r27: PKC_act -> PKC_act_translocate; (Kf_r27*PKC_act - Kr_r27*PKC_act_translocate)*c0;
  r28: GDI_inact -> GDI_act; Vmax_r28*GDI_inact/(Km_r28 + GDI_inact)*c0;  // modifiers: phosphatase
  r30: GDI_act -> GDI_inact; Vmax_r30*GDI_act/(Km_r30 + GDI_act)*c0;  // modifiers: PKC_act_translocate
  r25: GAP_inact -> GAP_act; Vmax_r25*GAP_inact/(Km_r25 + GAP_inact)*c0;  // modifiers: phosphatase
  r29: GAP_act -> GAP_inact; Vmax_r29*GAP_act/(Km_r29 + GAP_act)*c0;  // modifiers: PKC_act_translocate
  r31: RhoA_act -> RhoA_inact; Vmax_r31*RhoA_act/(Km_r31 + RhoA_act)*c0;  // modifiers: GDI_act
  r18: DAG -> DAG_deg; (Kf_r18*DAG - Kr_r18*DAG_deg)*c0;

  // Events:
  event0: at (time >= 1200), t0=false: Pyrilamine = 100;

  // Unit definitions:
  unit umol = 1e-6 mole;
  unit l = litre;
  unit um2 = (1e-6 metre)^2;
  unit um = 1e-6 metre;
  unit s = second;
  unit K = kelvin;
  unit _one_ = dimensionless;
  unit C_mol_1 = coulomb / mole;
  unit C_nmol_1 = coulomb / (1e-9 mole);
  unit molecules_pmol_1 = item / (1e-12 mole);
  unit _one_000000000 = 1e9 dimensionless;
  unit mV_C_K_1_mol_1 = 1e-3 volt * coulomb / (kelvin * mole);
  unit mV_V_1 = dimensionless;
  unit uM_um3_molecules_1 = 1e-6 mole * (1e-6 metre)^3 / (litre * item);
  unit l_s_1_umol_1 = litre / (second * 1e-6 mole);
  unit s_1 = 1 / second;
  unit umol_l_1 = 1e-6 mole / litre;
  unit umol_l_1_s_1 = 1e-6 mole / (litre * second);
end
